// COMSOL Multiphysics 6.0.0.318 model "结构AB4ACABA4.mph"
// Outline of the model tree

Parameters
  m = 4
  n = 1
  na = 3.23
  nb = 1.35
  nc = 1
  lamda0 = 1480[nm]
  da = lamda0/(4*na)
  db = lamda0/(4*nb)
  dc = 700[nm]
  theta = 0*pi/4
  dh = 0.6*lamda0
  d0 = 0.5*lamda0
  f0 = c_const/lamda0
  f1 = c_const/1000[nm]
  f2 = c_const/2500[nm]
  bc = c_const/2.2754E14

Geometry
  geom1 "Geometry 1" (2D, length unit m)
    r8: Rectangle | size = {d0, dh}
    r1: Rectangle | pos = {d0, 0}; size = {da, dh}
    r2: Rectangle | pos = {d0+da, 0}; size = {db, dh}
    arr1: Array | input = r1, r2; size = m; type = linear; linearsize = m; displ = {da+db, 0}
    r3: Rectangle | pos = {d0+m*(da+db), 0}; size = {da, dh}
    r4: Rectangle | pos = {d0+m*(da+db)+da, 0}; size = {dc, dh}
    r5: Rectangle | pos = {d0+m*(da+db)+da+dc, 0}; size = {da, dh}
    r6: Rectangle | pos = {d0+m*(da+db)+da+dc+da, 0}; size = {db, dh}
    r7: Rectangle | pos = {d0+m*(da+db)+da+dc+da+db, 0}; size = {da, dh}
    arr2: Array | input = r6, r7; size = m; type = linear; linearsize = m; displ = {db+da, 0}
    r9: Rectangle | pos = {d0+m*(da+db)+da+dc+da+m*(db+da), 0}; size = {d0, dh}
    fin: Finalize "Form Union"

Materials
  mat1: Common "Material 1" on domains 1, 21
    def "Basic"
      relpermittivity = 1
      relpermeability = 1
      electricconductivity = 0
  mat2: Common "Material 2" on domains 2, 4, 6, 8, 10, 12, 14, 16, 18, 20
    def "Basic"
      relpermittivity = na^2
      relpermeability = 1
      electricconductivity = 0
  mat3: Common "Material 3" on domains 3, 5, 7, 9, 13, 15, 17, 19
    def "Basic"
      relpermittivity = nb^2
      relpermeability = 1
      electricconductivity = 0
  mat4: Common "Material 4" on domains 11
    def "Basic"
      relpermittivity = nc^2
      relpermeability = 1
      electricconductivity = 0

Physics
  emw: ElectromagneticWaves "Electromagnetic Waves, Frequency Domain" on all domains
    dependent variable E = {Ex, Ey, Ez}
    wee1: WaveEquationElectric (default)
    pec1: PerfectElectricConductor (default)
    init1: init "Initial Values 1" (default)
    port1: Port on boundaries 1 | PortType = Rectangular
    port2: Port on boundaries 64 | PortType = Rectangular

Mesh
  mesh1 "Mesh 1"
    size: MeshSizeDefault | hmax = 0.1*lamda0/4; hmin = 0.1*lamda0/5; hcurve = 0.25; hgrad = 1.2; custom = on
    edg1: Edge on boundaries 3, 6, 9, 12, 15, 18, 21, 24, 27, 30, 33, 36, 39, 42, 45, 48, 51, 54, 57, 60, 63
    cpe1: CopyEdge
      source = boundaries 3, 6, 9, 12, 15, 18, 21, 24, 27, 30, 33, 36, 39, 42, 45, 48, 51, 54, 57, 60, 63
      destination = boundaries 2, 5, 8, 11, 14, 17, 20, 23, 26, 29, 32, 35, 38, 41, 44, 47, 50, 53, 56, 59, 62
    ftri1: FreeTri "Free Triangular 1" on remaining entities

Studies
  std1 "Study 1"
    freq: Frequency "Frequency Domain" | punit = Hz; plist = range(1.5e14,2.0e14/39,3.5e14)

Solver configurations
  sol1 "Solution 1" (study std1)
    v1: Variables "Dependent Variables 1"
    s1: Stationary "Stationary Solver 1" | stol = 0.01
      p1: Parametric | pname = freq; plistarr = range(1.5e14,2.0e14/39,3.5e14); punit = Hz; pcontinuationmode = no
      fc1: FullyCoupled | linsolver = d1
      d1: Direct "Suggested Direct Solver (emw)" | linsolver = pardiso

Datasets
  dset1: Solution | solution = sol1
  cln1: CutLine2D | data = dset1; genpoints = {{0, dh/2}, {d0+m*(da+db)+da+dc+da+m*(db+da)+d0, dh/2}}

Derived values
  gev1: EvalGlobal "S-parameter (emw)" | data = dset1; table = tbl1; expr = {emw.S11dB, emw.S21dB}

Tables
  tbl1: Table
    freq (Hz) | S11 (1) | S21 (1)
    2.02562e+14 | -2.15764e-09 | -93.0381

Plots
  pg1: PlotGroup2D "Electric Field (emw)" | data = dset1
    surf1: Surface | expr = emw.Ez
  pg2: PlotGroup1D "1D Plot Group 2" | data = cln1
    glob1: Global | expr = {abs(emw.S11)^2, abs(emw.S21)^2}; descr = {S11, S21}; legends = {反射率, 透射率}
  pg3: PlotGroup1D "1D Plot Group 3" | data = cln1
    lngr1: LineGraph | expr = emw.normE